<?xml-stylesheet href="JSBSim.xsl" type="application/xml"?>
<fdm_config xmlns:xsi="http://www.w3.org/2001/XMLSchema-instance"
    xsi:noNamespaceSchemaLocation="http://jsbsim.sourceforge.net/JSBSim.xsd" version="2.0" release="BETA">

    <fileheader>
        <author>Herbert Wagner, Torsten Dreyer, Gijs de Rooy</author>
        <filecreationdate>2016-01-26</filecreationdate>
        <version>1.5</version>
        <description>A follow me car</description>
    </fileheader>

    <metrics>
        <wingarea unit="M2">8</wingarea>
        <wingspan unit="M">4</wingspan>
        <chord unit="M">2</chord>
        <htailarea unit="M2">1</htailarea>
        <htailarm unit="M">1</htailarm>
        <vtailarea unit="M2">1</vtailarea>
        <vtailarm unit="M">1</vtailarm>
        <location name="AERORP" unit="M">
            <x>0</x>
            <y>0</y>
            <z>0.80</z>
        </location>
        <location name="EYEPOINT" unit="M">
            <x>-0.3 </x>
            <y>0.0 </y>
            <z>2.10</z>
        </location>
        <location name="VRP" unit="M">
            <x> 0.0 </x>
            <y> 0.0 </y>
            <z> 0.0 </z>
        </location>
    </metrics>

    <mass_balance>
        <ixx unit="SLUG*FT2"> 5596 </ixx>
        <iyy unit="SLUG*FT2"> 5334 </iyy>
        <izz unit="SLUG*FT2"> 15945 </izz>
        <ixz unit="SLUG*FT2"> 0 </ixz>
        <emptywt unit="KG"> 3500 </emptywt>
        <location name="CG" unit="M">
            <x> 1.5 </x>
            <y> 0.0 </y>
            <z> 0.3 </z>
        </location>

	<pointmass name="pseudo weight back">
            <weight unit="KG">620</weight>
            <location unit="M">
                <x>2.8</x>
                <y>0</y>
                <z>0.3</z>
            </location>
        </pointmass>

	<pointmass name="Main-tank">
	    <weight unit="LBS">300</weight>
	    <location name="Main Tank" unit="M">
		<x> 2.8 </x>
	        <y> 0.0 </y>
	        <z> 0.6 </z>
	    </location>
	</pointmass>

    </mass_balance>

    <ground_reactions>
        <contact type="BOGEY" name="FL">
            <location unit="M">
                <x> 0.68</x>
                <y>-0.76</y>
                <z>-0.01</z>
            </location>
            <static_friction> 1.80 </static_friction>
            <dynamic_friction> 1.70 </dynamic_friction>
            <rolling_friction> 0.10 </rolling_friction>
            <spring_coeff unit="LBS/FT"> 26000 </spring_coeff>
            <damping_coeff unit="LBS/FT/SEC"> 1040 </damping_coeff>
            <max_steer unit="DEG"> 40 </max_steer>
            <brake_group> LEFT </brake_group>
            <retractable>0</retractable>
        </contact>
        <contact type="BOGEY" name="FR">
            <location unit="M">
                <x> 0.68</x>
                <y> 0.76</y>
                <z>-0.01</z>
            </location>
            <static_friction> 1.80 </static_friction>
            <dynamic_friction> 1.70 </dynamic_friction>
            <rolling_friction> 0.10 </rolling_friction>
            <spring_coeff unit="LBS/FT"> 26000 </spring_coeff>
            <damping_coeff unit="LBS/FT/SEC"> 1040 </damping_coeff>
            <max_steer unit="DEG"> 40 </max_steer>
            <brake_group> RIGHT </brake_group>
            <retractable>0</retractable>
        </contact>
        <contact type="BOGEY" name="BL">
            <location unit="M">
                <x> 3.17</x>
                <y>-0.76</y>
                <z>-0.01</z>
            </location>
            <static_friction> 1.80 </static_friction>
            <dynamic_friction> 1.70 </dynamic_friction>
            <rolling_friction> 0.10 </rolling_friction>
            <spring_coeff unit="LBS/FT"> 26000 </spring_coeff>
            <damping_coeff unit="LBS/FT/SEC"> 1040 </damping_coeff>
            <brake_group> LEFT </brake_group>
            <retractable>0</retractable>
        </contact>
        <contact type="BOGEY" name="BR">
            <location unit="M">
                <x> 3.17</x>
                <y> 0.76</y>
                <z>-0.01</z>
            </location>
            <static_friction> 1.80 </static_friction>
            <dynamic_friction> 1.70 </dynamic_friction>
            <rolling_friction> 0.10 </rolling_friction>
            <spring_coeff unit="LBS/FT"> 26000 </spring_coeff>
            <damping_coeff unit="LBS/FT/SEC"> 1040 </damping_coeff>
            <brake_group> RIGHT </brake_group>
            <retractable>0</retractable>
        </contact>

	<contact type="STRUCTURE" name="MIDDLE-LEFT">
	<location unit="M">
	  <x> 1.819 </x>
	  <y> -0.69 </y>
	  <z> 1.568 </z>
	</location>
	<spring_coeff unit="LBS/FT"> 18000 </spring_coeff>
	<damping_coeff unit="LBS/FT/SEC"> 1000 </damping_coeff>
      </contact>
      <contact type="STRUCTURE" name="MIDDLE-RIGHT">
	<location unit="M">
	  <x> 1.819 </x>
	  <y> 0.69 </y>
	  <z> 1.568 </z>
	</location>
	<spring_coeff unit="LBS/FT"> 18000 </spring_coeff>
	<damping_coeff unit="LBS/FT/SEC"> 1000 </damping_coeff>
      </contact>

      <contact type="STRUCTURE" name="BACK-LEFT">
	<location unit="M">
	  <x> 3.582 </x>
	  <y> -0.60 </y>
	  <z> 1.659 </z>
	</location>
	<spring_coeff unit="LBS/FT"> 18000 </spring_coeff>
	<damping_coeff unit="LBS/FT/SEC"> 1000 </damping_coeff>
      </contact>
      <contact type="STRUCTURE" name="BACK-RIGHT">
	<location unit="M">
	  <x> 3.582 </x>
	  <y> 0.60 </y>
	  <z> 1.659 </z>
	</location>
	<spring_coeff unit="LBS/FT"> 18000 </spring_coeff>
	<damping_coeff unit="LBS/FT/SEC"> 1000 </damping_coeff>
      </contact>

      <contact type="STRUCTURE" name="LEFT">
	<location unit="M">
	  <x> 0.283 </x>
	  <y> -0.70 </y>
	  <z> 0.837 </z>
	</location>
	<spring_coeff unit="LBS/FT"> 18000 </spring_coeff>
	<damping_coeff unit="LBS/FT/SEC"> 1000 </damping_coeff>
      </contact>
      <contact type="STRUCTURE" name="RIGHT">
	<location unit="M">
	  <x> 0.283 </x>
	  <y> -0.70 </y>
	  <z> 0.837 </z>
	</location>
	<spring_coeff unit="LBS/FT"> 18000 </spring_coeff>
	<damping_coeff unit="LBS/FT/SEC"> 1000 </damping_coeff>
      </contact>

    </ground_reactions>

    <propulsion>
      <engine file="436TP">
	<location unit="M">
	  <x> 1.0 </x>
	  <y> -0.0 </y>
	  <z> 0.464 </z>
	</location>
	<orient unit="DEG">
	  <pitch> 0.00 </pitch>
	  <roll>  0.00 </roll>
	  <yaw>   0.00 </yaw>
	</orient>
	<feed>0</feed>
	<thruster file="direct">
	  <location unit="M">
	    <x> 1.0 </x>
	    <y> -0.0 </y>
	    <z> 0.464 </z>
	  </location>
	  <orient unit="DEG">
	    <pitch> 0.00 </pitch>
	    <roll>  0.00 </roll>
	    <yaw>   0.00 </yaw>
	  </orient>
	</thruster>
      </engine>
      <!--
      Tank
      -->
      <tank type="FUEL" number="0">
	<location unit="M">
	  <x>  2.5 </x>
	  <y> -0.0 </y>
	  <z>  0.6 </z>
	</location>
	<priority>1</priority>
	<capacity unit="KG"> 86.3 </capacity>
	<contents unit="KG"> 10.35 </contents>
      </tank>

      </propulsion>

    <flight_control name="Truck">
        <property value="0">/controls/engines/engine/direction</property>
        <channel name="Engine">
          <fcs_function name="fcs/engine-force">
            <function>
              <product>
                <property>/controls/engines/engine/throttle</property>
                <property>/controls/engines/engine/direction</property>
                <value>2200</value>
		<table>
                          <independentVar>/velocities/groundspeed-kt</independentVar>
                          <tableData>
                              0.0	3.0
                              10.0	2.5
                              50.0	2.2
                              80.0	1.3
                              100.0	1.0
			      140.0     0.9
			      160.0     0.5
			      180.0     0.1
                          </tableData>
                      </table>
              </product>
            </function>
            <output>external_reactions/engine/magnitude</output>
          </fcs_function>
        </channel>

        <channel name="Steer">
            <summer name="Steer Sum">
                <input>fcs/rudder-cmd-norm</input>
                <clipto>
                    <min>-1</min>
                    <max>1</max>
                </clipto>
                <output>fcs/rudder-pos-norm</output>
            </summer>
        </channel>
    </flight_control>

    <aerodynamics>

    </aerodynamics>

    <external_reactions>
      <force name="engine" frame="BODY">
        <location unit="M">
		<x> 1.0</x>
		<y> 0</y>
		<z> 0.5</z>
        </location>
        <direction>
          <x>1</x>
          <y>0</y>
          <z>0</z>
        </direction>
      </force>
    </external_reactions>
</fdm_config>
